// SBML level 2 version 4

model sim2_simulation_example()
  // This is a sample file for CellDesigner 4.2. http://celldesigner.org

  // Compartments:
  compartment default = 1 volume;

  // Species:
  species A in default = 0.5/default;
  species B in default = 0.2/default;
  species E in default = 0;
  species F in default = 0;
  species C in default = 0.01/default;
  species D in default = 0.02/default;

  // Reactions:
  re1: A + B => C; A*B*k1;
    k1 = 0.3;
  re2: D => E + F; D*k3;
    k3 = 0.6;
  re3: C => D; C*k2;
    k2 = 0.01;

  // Unit definitions:
  unit substance = mole;
  unit volume = litre;
  unit area = metre^2;
  unit length = metre;
  unit time = second;
end
